<?xml version="1.0" encoding="UTF-8"?>
<channelml xmlns="http://morphml.org/channelml/schema" xmlns:xsi="http://www.w3.org/2001/XMLSchema-instance" xmlns:meta="http://morphml.org/metadata/schema" xsi:schemaLocation="http://morphml.org/channelml/schema http://www.neuroml.org/NeuroMLValidator/NeuroMLFiles/Schemata/v1.8.1/Level2/ChannelML_v1.8.1.xsd" units="Physiological Units">

    <meta:notes>AOB A Type Potassium Ion Channel</meta:notes>

    <channel_type name="KA_iAMC_ChannelML">

       <status value="stable">
            <meta:comment>A Type Potassium Ion Channel from an intrinsically oscillating AOB mitral cell from parameters recorded in the lab of M. Spehr RWTH Aachen</meta:comment>
            <meta:contributor>
                <meta:name>Simon O'Connor</meta:name>
            </meta:contributor>
        </status>

	<meta:notes>A-type K channel, with rate equations expressed in tau and inf form</meta:notes>

        <meta:authorList>
            <meta:modelTranslator>
                <meta:name>Simon O'Connor</meta:name>
                <meta:institution>UH</meta:institution>
                <meta:email>simon.oconnor - at - btinternet.com</meta:email>
            </meta:modelTranslator>
        </meta:authorList>

      <meta:neuronDBref>
	<meta:modelName>K channels</meta:modelName>
	<meta:uri>http://senselab.med.yale.edu/neurondb/channelGene2.aspx#table3</meta:uri>
      </meta:neuronDBref>

      <current_voltage_relation cond_law="ohmic" ion="k" default_gmax="4" default_erev="-86.5">

	<gate name="m" instances="1">
	  <closed_state id="m0"/>
	  <open_state id="m"/>

	  <time_course name="tau" from="m0" to="m" expr_form="generic" expr="(1+4*exp(-((v-32)/50)^2))"/>
	  <steady_state name="inf" from="m0" to="m" expr_form="generic" expr="v &lt; -50 ? 0 : 1 / (1 + exp(0 - (v + 25.7)/4.4))"/>

	</gate>

	<gate name="h" instances="1">
	  <closed_state id="h0"/>
	  <open_state id="h"/>

	  <time_course name="tau" from="h0" to="h" expr_form="generic" expr="(1+100*exp(-((v-10)/40)^2))"/>
	  <steady_state name="inf" from="h0" to="h" expr_form="sigmoid" rate="1" scale="4.4" midpoint="-25"/>

	</gate>
      </current_voltage_relation>

  </channel_type>
</channelml>
