<?xml version="1.0" encoding="ISO-8859-1"?>
<neuroml xmlns="http://www.neuroml.org/schema/neuroml2"
	 xmlns:xsi="http://www.w3.org/2001/XMLSchema-instance"
	 xsi:schemaLocation="http://www.neuroml.org/schema/neuroml2 https://raw.github.com/NeuroML/NeuroML2/development/Schemas/NeuroML2/NeuroML_v2beta4.xsd"
	 id="Kdr_iAMC">

    <notes>AOB Mitral Cell Direct Rectifier Potassium Ion Channel</notes>

    <ionChannel id="Kdr_iAMC" conductance="10pS" type="ionChannelHH" species="k">

	<notes>Potassium direct rectifier conductance from an intrinsically oscillating AOB mitral cell from parameters recorded in the lab of M. Spehr RWTH Aachen</notes>

	<annotation>
	    <rdf:RDF xmlns:rdf="http://www.w3.org/1999/02/22-rdf-syntax-ns#">
		<rdf:Description rdf:about="kdr">

		    <bqmodel:isDescribedBy xmlns:bqmodel="http://biomodels.net/model-qualifiers/">
			<rdf:Bag>
			    <rdf:li>??</rdf:li>
			    <rdf:li rdf:resource="http://www.ncbi.nlm.nih.gov/entrez/query.fcgi?cmd=Retrieve&amp;db=pubmed&amp;dopt=Abstract&amp;list_uids=??"/>
			</rdf:Bag>
		    </bqmodel:isDescribedBy>

		    <bqbiol:isVersionOf xmlns:bqbiol="http://biomodels.net/biology-qualifiers/">
			<rdf:Bag>
			    <rdf:li>Na channels</rdf:li>
			    <rdf:li rdf:resource="http://senselab.med.yale.edu/senselab/NeuronDB/??"/>
			</rdf:Bag>
		    </bqbiol:isVersionOf>

		</rdf:Description>
	    </rdf:RDF>
	</annotation>

	<gate id="m" type="gateHHtauInf" instances="?">
	    <timeCourse type="kdr_m_tau_tau"/>
	    <steadyState type="HHSigmoidVariable" rate="1" scale="19.8mV" midpoint="-36mV"/>
	</gate>

    </ionChannel>

    <ComponentType name="kdr_m_tau_tau" extends="baseVoltageDepTime">
	<Constant name="TIME_SCALE" dimension="time" value="1 ms"/>
	<Constant name="VOLT_SCALE" dimension="voltage" value="1 mV"/>

	<Dynamics>
	    <DerivedVariable name="V" dimension="none" value="v / VOLT_SCALE"/>
	    <DerivedVariable name="t" exposure="t" dimension="time" value="1/((exp((V+A)/B))+(exp((-V-C)/B))) * TIME_SCALE"/>
	</Dynamics>

    </ComponentType>

</neuroml>
