<?xml version="1.0" encoding="ISO-8859-1"?>
<neuroml xmlns="http://www.neuroml.org/schema/neuroml2" xmlns:xsi="http://www.w3.org/2001/XMLSchema-instance" xsi:schemaLocation="http://www.neuroml.org/schema/neuroml2 https://raw.github.com/NeuroML/NeuroML2/development/Schemas/NeuroML2/NeuroML_v2beta4.xsd" id="Gran_CaPool_98">

    <notes>A channel from Maex, R and De Schutter, E. Synchronization of Golgi and Granule Cell Firing in a
      Detailed Network Model of the Cerebellar Granule Cell Layer</notes>

    <decayingPoolConcentrationModel id="Gran_CaPool_98" restingConc="7.55e-5mM" decayConstant="1e-2s" ion="ca" shellThickness="8.4e-8m"/>

</neuroml>
