<Lems>

    <!--

        This LEMS file has been automatically generated using PyNeuroML v0.1.13 (libNeuroML v0.2.11)

     -->

    <!-- Specify which component to run -->
    <Target component="Vm_iMC1_cell_1_origin"/>

    <!-- Include core NeuroML2 ComponentType definitions -->
    <Include file="Cells.xml"/>
    <Include file="Networks.xml"/>
    <Include file="Simulation.xml"/>

    <Include file="iMC1_cell_1_origin.cell.nml"/>
    <Include file="BK_IAMC_ChannelML.channel.nml"/>
    <Include file="CaV_R_iAMC_ChannelML.channel.nml"/>
    <Include file="Gran_CaPool_98.nml"/>
    <Include file="KA_iAMC_ChannelML.channel.nml"/>
    <Include file="Kdr_iAMC_ChannelML.channel.nml"/>
    <Include file="LeakConductance.channel.nml"/>
    <Include file="NaP_iAMC_ChannelML.channel.nml"/>
    <Include file="NaxSH0_ChannelML.channel.nml"/>
    <Include file="NaxSH10_ChannelML.channel.nml"/>
    <Include file="Vm_iMC1_cell_1_origin.sim.nml"/>
    <Include file="iMC1_cell_1_origin.cell.nml"/>
    <Include file="BK_IAMC_ChannelML.channel.nml"/>
    <Include file="CaV_R_iAMC_ChannelML.channel.nml"/>
    <Include file="Gran_CaPool_98.nml"/>
    <Include file="KA_iAMC_ChannelML.channel.nml"/>
    <Include file="Kdr_iAMC_ChannelML.channel.nml"/>
    <Include file="LeakConductance.channel.nml"/>
    <Include file="NaP_iAMC_ChannelML.channel.nml"/>
    <Include file="NaxSH0_ChannelML.channel.nml"/>
    <Include file="NaxSH10_ChannelML.channel.nml"/>

    <Simulation id="Vm_iMC1_cell_1_origin" length="1000ms" step="0.05ms" target="network" seed="12345">  <!-- Note seed: ensures same random numbers used every run -->

        <Display id="Voltage_display" title="Voltages" timeScale="1ms" xmin="-100.0" xmax="1100.0" ymin="-90" ymax="50">
            <Line id="V" quantity="single_cell/0/iMC1_cell_1_origin/v" scale="1mV" color="#1bc55d" timeScale="1ms"/>
        </Display>

        <OutputFile id="Volts_file" fileName="Vm_iMC1_cell_1_origin.v.dat">
            <OutputColumn id="V" quantity="single_cell/0/iMC1_cell_1_origin/v"/>
        </OutputFile>

    </Simulation>

</Lems>
