<neuroml xmlns="http://www.neuroml.org/schema/neuroml2"  xmlns:xs="http://www.w3.org/2001/XMLSchema" xmlns:xsi="http://www.w3.org/2001/XMLSchema-instance" xsi:schemaLocation="http://www.neuroml.org/schema/neuroml2 https://raw.github.com/NeuroML/NeuroML2/development/Schemas/NeuroML2/NeuroML_v2beta4.xsd" id="hhcell">
    <include href="MIG2_SingleCompHHCell.nml"></include>
    <pulseGenerator id="input_80" delay="20ms" duration="60ms" amplitude="80pA"/>
    <network id="network">
        <population id="hhpop" type="populationList" component="hhcell" size="1">
            <instance id="0">
                <location y="0." x="0." z="0."/>
            </instance>
        </population>
        <inputList id="il_input_80" component="input_80" population="hhpop">
            <input destination="synapses" id="0" target="../hhpop/0/hhcell"/>
        </inputList>
    </network>
</neuroml>
