<?xml version="1.0" encoding="UTF-8"?>
<neuroml xmlns="http://www.neuroml.org/schema/neuroml2" xmlns:xsi="http://www.w3.org/2001/XMLSchema-instance" xsi:schemaLocation="http://www.neuroml.org/schema/neuroml2  https://raw.githubusercontent.com/NeuroML/NeuroML2/development/Schemas/NeuroML2/NeuroML_v2beta4.xsd" id="iMC1_cell_1_origin">

    <include href="BK_IAMC_ChannelML.channel.nml"/>

    <include href="CaV_R_iAMC_ChannelML.channel.nml"/>

    <include href="Gran_CaPool_98.nml"/>

    <include href="KA_iAMC_ChannelML.channel.nml"/>

    <include href="Kdr_iAMC_ChannelML.channel.nml"/>

    <include href="LeakConductance.channel.nml"/>

    <include href="NaP_iAMC_ChannelML.channel.nml"/>

    <include href="NaxSH0_ChannelML.channel.nml"/>

    <include href="NaxSH10_ChannelML.channel.nml"/>

    <cell id="iMC1_cell_1_origin">

        <notes>This is an AOB mitral cell that exhibited intrinsic oscillations
reconstructed using Imaris confocal microscope software by Katja Watznauer

cell split from iMC1 as:

iMC1_cell_1

Imaris exported file name:

130918_MC_labelled_slice1_oscillating_MC_d1.ims.hoc</notes>

        <morphology id="morphology_iMC1_cell_1_origin">

            <segment id="0" name="filament_100000001_0__0">
                <proximal x="0.0" y="0.0" z="0.0" diameter="12.2349"/>
                <distal x="-0.3659973" y="-0.3702011" z="0.2998047" diameter="12.2349"/>
            </segment>

            <segment id="1" name="filament_100000001_0__1">
                <parent segment="0"/>
                <distal x="-0.7089844" y="-0.7397003" z="0.5996094" diameter="10.662"/>
            </segment>

            <segment id="2" name="filament_100000001_0__2">
                <parent segment="1"/>
                <distal x="-1.0109863" y="-1.1075974" z="0.9003906" diameter="9.40106"/>
            </segment>

            <segment id="3" name="filament_100000001_0__3">
                <parent segment="2"/>
                <distal x="-1.2579956" y="-1.4731979" z="1.2998047" diameter="8.47136"/>
            </segment>

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
            <segmentGroup id="filament_100000001_0" neuroLexId="sao864921383">    <!--
                This group contains an unbranched set of segments, and all of the segmentGroups marked with
                neuroLexId = sao864921383 form a non-overlapping set of all of the segments.
                These segmentGroups correspond to the 'cables' of NeuroML v1.8.1. -->

                <member segment="0"/>

                <member segment="1"/>

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            </segmentGroup>

            <segmentGroup id="filament_100000001_0_split" neuroLexId="sao864921383">    <!--
                This group contains an unbranched set of segments, and all of the segmentGroups marked with
                neuroLexId = sao864921383 form a non-overlapping set of all of the segments.
                These segmentGroups correspond to the 'cables' of NeuroML v1.8.1. -->

                <member segment="14"/>

                <member segment="15"/>

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            </segmentGroup>

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
            <segmentGroup id="soma_group" neuroLexId="GO:0043025">    <!--Soma group-->

                <include segmentGroup="filament_100000001_0"/>
                <include segmentGroup="filament_100000001_7"/>
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            </segmentGroup>

            <segmentGroup id="axon_group" neuroLexId="GO:0030424">    <!--Axon group-->

                <include segmentGroup="filament_100000001_0_split"/>
                <include segmentGroup="filament_100000001_1"/>
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            </segmentGroup>

            <segmentGroup id="dendrite_group" neuroLexId="GO:0030425">    <!--Dendrite group-->

                <include segmentGroup="filament_100000001_7_split"/>
                <include segmentGroup="filament_100000001_8"/>
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            </segmentGroup>

        </morphology>

            <!--Adding the biophysical parameters-->

        <biophysicalProperties id="biophys">

            <membraneProperties>

                <channelDensity condDensity="0.9 mS_per_cm2" id="BK_IAMC_ChannelML_soma_group" ionChannel="BK_IAMC_ChannelML" segmentGroup="soma_group" ion="k" erev="-86.5 mV"/>

                <channelDensity condDensity="0.001 mS_per_cm2" id="CaV_R_iAMC_ChannelML_soma_group" ionChannel="CaV_R_iAMC_ChannelML" segmentGroup="soma_group" ion="ca" erev="80.0 mV"/>

                <channelDensity condDensity="0.001 mS_per_cm2" id="CaV_R_iAMC_ChannelML_dendrite_group" ionChannel="CaV_R_iAMC_ChannelML" segmentGroup="dendrite_group" ion="ca" erev="80.0 mV"/>

                <channelDensity condDensity="28.68 mS_per_cm2" id="KA_iAMC_ChannelML_axon_group" ionChannel="KA_iAMC_ChannelML" segmentGroup="axon_group" ion="k" erev="-86.5 mV"/>

                <channelDensity condDensity="2.868 mS_per_cm2" id="KA_iAMC_ChannelML_soma_group" ionChannel="KA_iAMC_ChannelML" segmentGroup="soma_group" ion="k" erev="-86.5 mV"/>

                <channelDensity condDensity="2.868 mS_per_cm2" id="KA_iAMC_ChannelML_dendrite_group" ionChannel="KA_iAMC_ChannelML" segmentGroup="dendrite_group" ion="k" erev="-86.5 mV"/>

                <channelDensity condDensity="146.0 mS_per_cm2" id="Kdr_iAMC_ChannelML_all" ionChannel="Kdr_iAMC_ChannelML" ion="k" erev="-86.5 mV"/>

                <channelDensity condDensity="0.01676 mS_per_cm2" id="LeakConductance_all" ionChannel="LeakConductance" ion="non_specific" erev="-74.1 mV"/>

                <channelDensity condDensity="40.0 mS_per_cm2" id="NaP_iAMC_ChannelML_soma_group" ionChannel="NaP_iAMC_ChannelML" segmentGroup="soma_group" ion="na" erev="67.0 mV"/>

                <channelDensity condDensity="40.0 mS_per_cm2" id="NaP_iAMC_ChannelML_dendrite_group" ionChannel="NaP_iAMC_ChannelML" segmentGroup="dendrite_group" ion="na" erev="67.0 mV"/>

                <channelDensity condDensity="70.0 mS_per_cm2" id="NaxSH0_ChannelML_axon_group" ionChannel="NaxSH0_ChannelML" segmentGroup="axon_group" ion="na" erev="67.0 mV"/>

                <channelDensity condDensity="7.0 mS_per_cm2" id="NaxSH10_ChannelML_soma_group" ionChannel="NaxSH10_ChannelML" segmentGroup="soma_group" ion="na" erev="67.0 mV"/>

                <channelDensity condDensity="7.0 mS_per_cm2" id="NaxSH10_ChannelML_dendrite_group" ionChannel="NaxSH10_ChannelML" segmentGroup="dendrite_group" ion="na" erev="67.0 mV"/>

                <spikeThresh value="0.0 mV"/>

                <specificCapacitance value="0.799 uF_per_cm2"/>

                <initMembPotential value="-74.1 mV"/>

            </membraneProperties>

            <intracellularProperties>

                <species segmentGroup="dendrite_group" id="ca" ion="ca" concentrationModel="Gran_CaPool_98" initialConcentration="7.55E-11 mol_per_cm3" initialExtConcentration="2.4E-6 mol_per_cm3"/>

                <species segmentGroup="soma_group" id="ca" ion="ca" concentrationModel="Gran_CaPool_98" initialConcentration="7.55E-11 mol_per_cm3" initialExtConcentration="2.4E-6 mol_per_cm3"/>

                <resistivity value="0.056 kohm_cm"/>

            </intracellularProperties>

        </biophysicalProperties>

    </cell>

    <network id="net1" type="networkWithTemperature" temperature="32.0 degC">
        <population id="single_cell" component="iMC1_cell_1_origin" size="1"/>
        <!--explicitInput target="single_cell[0]" input="pulseGen1"/-->
    </network>

</neuroml>
