<?xml version="1.0" encoding="UTF-8"?>
<channelml xmlns="http://morphml.org/channelml/schema" xmlns:xsi="http://www.w3.org/2001/XMLSchema-instance" xmlns:meta="http://morphml.org/metadata/schema" xsi:schemaLocation="http://morphml.org/channelml/schema  http://www.neuroml.org/NeuroMLValidator/NeuroMLFiles/Schemata/v1.8.1/Level2/ChannelML_v1.8.1.xsd" units="Physiological Units">

    <meta:notes>Mitral Cell Persistent Sodium ion Channel</meta:notes>

    <channel_type name="NaP_iAMC_ChannelML" density="yes">

        <status value="stable">
            <meta:comment>Sodium Persistent conductance modified from Rubin an Cleland 2006 using AOB mitral cell data from the Marc Spehr RWTH Aachen</meta:comment>
            <meta:contributor>
                <meta:name>Simon O'Connor</meta:name>
            </meta:contributor>
        </status>

        <meta:notes>Na Channel</meta:notes>

        <meta:authorList>
            <meta:modelTranslator>
                <meta:name>Simon O'Connor</meta:name>
                <meta:institution>UH</meta:institution>
                <meta:email>simon.oconnor - at - btinternet.com</meta:email>
            </meta:modelTranslator>
        </meta:authorList>

        <current_voltage_relation cond_law="ohmic" ion="na" default_gmax="0.06" default_erev="67" charge="1">

            <gate name="m" instances="3">
                <closed_state id="m0"/>
                <open_state id="m" fraction="1"/>

                <time_course name="tau" from="m0" to="m" expr_form="generic" expr="(1+(4 * (exp(0 - ((v + 50)/20)^2))))"/>
                <steady_state name="inf" from="m0" to="m" expr_form="sigmoid" rate="0.499622025796" scale="-4.9" midpoint="-59.0"/>
	    </gate>

            <gate name="h" instances="1">
                <closed_state id="h0"/>
                <open_state id="h" fraction="1"/>

                <time_course name="tau" from="h0" to="h" expr_form="generic" expr="(5000+(16000 * (exp(0 - ((v + 50)/20)^2))))"/>
                <steady_state name="inf" from="h0" to="h" expr_form="sigmoid" rate="0.499622025796" scale="4.9" midpoint="-59.0"/>
	    </gate>

            <gate name="n" instances="1">
                <closed_state id="n0"/>
                <open_state id="n" fraction="1"/>

                    <!--time_course name="tau" from="n0" to="n" expr_form="generic" expr="1"/-->

		    <time_course name="tau" from="n0" to="n" expr_form="generic" expr="(2+(4 * (exp(0 - ((v + 50)/20)^2))))"/>

                <steady_state name="inf" from="n0" to="n" expr_form="sigmoid" rate="0.499622025796" scale="4.9" midpoint="-59.0"/>
	    </gate>
	</current_voltage_relation>

        <impl_prefs>
            <table_settings max_v="100" min_v="-100" table_divisions="2000"/>
        </impl_prefs>

    </channel_type>
</channelml>
