<?xml version="1.0" encoding="UTF-8"?>
<neuroml xmlns="http://www.neuroml.org/schema/neuroml2" xmlns:xsi="http://www.w3.org/2001/XMLSchema-instance" xsi:schemaLocation="http://www.neuroml.org/schema/neuroml2  https://raw.githubusercontent.com/NeuroML/NeuroML2/development/Schemas/NeuroML2/NeuroML_v2beta4.xsd" id="network_AOB_MC_Single_Channel_Tests_copy">

    <notes>

Network structure (NeuroML 2beta4) for project: AOB_MC_Single_Channel_Tests_copy saved with neuroConstruct v1.7.1 on: 17:23:08, 02-Sep-16

Cell Group: CellGroup_0 contains 1 cells

    </notes>

    <include href="BK_IAMC_ChannelML.channel.nml"/>
    <include href="CaV_R_iAMC_ChannelML.channel.nml"/>
    <include href="Gran_CaPool_98.nml"/>
    <include href="iMC1_cell_1_origin.cell.nml"/>
    <include href="KA_iAMC_ChannelML.channel.nml"/>
    <include href="Kdr_iAMC_ChannelML.channel.nml"/>
    <include href="LeakConductance.channel.nml"/>
    <include href="NaP_iAMC_ChannelML.channel.nml"/>
    <include href="NaxSH0_ChannelML.channel.nml"/>
    <include href="NaxSH10_ChannelML.channel.nml"/>
    <network id="network_AOB_MC_Single_Channel_Tests_copy" type="networkWithTemperature" temperature="35.0 degC">

        <population id="CellGroup_0" component="iMC1_cell_1_origin" type="populationList" size="1">
            <instance id="0">
                <location x="104.920364" y="18.725296" z="37.0781"/>
            </instance>
        </population>

            <!--There are no synaptic connections present in the network-->

            <!--There are no electrical inputs present in the network-->

    </network>

</neuroml>
